<neuroml xmlns="http://www.neuroml.org/schema/neuroml2"  xmlns:xs="http://www.w3.org/2001/XMLSchema" xmlns:xsi="http://www.w3.org/2001/XMLSchema-instance" xsi:schemaLocation="http://www.neuroml.org/schema/neuroml2 https://raw.github.com/NeuroML/NeuroML2/development/Schemas/NeuroML2/NeuroML_v2beta4.xsd" id="Golgi_V2010_reg_from_ltor_200_no_expThree_trial0">
    <include href="Golgi_10comp_13channels_2CaPoolsT.cell.nml"></include>
    <include href="PF.synapse.nml"></include>
    <gapJunction id="gap_junction00" conductance="4.502741nS"/>
    <gapJunction id="gap_junction01" conductance="2.086763nS"/>
    <gapJunction id="gap_junction02" conductance="0.496621nS"/>
    <gapJunction id="gap_junction03" conductance="0.952363nS"/>
    <gapJunction id="gap_junction04" conductance="0.860491nS"/>
    <gapJunction id="gap_junction05" conductance="0.629918nS"/>
    <gapJunction id="gap_junction06" conductance="0.095911nS"/>
    <gapJunction id="gap_junction07" conductance="0.243622nS"/>
    <gapJunction id="gap_junction08" conductance="0.485639nS"/>
    <gapJunction id="gap_junction09" conductance="0.654015nS"/>
    <gapJunction id="gap_junction010" conductance="0.379442nS"/>
    <gapJunction id="gap_junction011" conductance="0.192186nS"/>
    <gapJunction id="gap_junction012" conductance="2.619985nS"/>
    <gapJunction id="gap_junction013" conductance="0.683959nS"/>
    <gapJunction id="gap_junction014" conductance="0.987830nS"/>
    <gapJunction id="gap_junction015" conductance="1.020398nS"/>
    <gapJunction id="gap_junction016" conductance="0.110429nS"/>
    <gapJunction id="gap_junction017" conductance="0.084706nS"/>
    <gapJunction id="gap_junction018" conductance="0.257339nS"/>
    <gapJunction id="gap_junction019" conductance="1.509309nS"/>
    <gapJunction id="gap_junction020" conductance="0.753250nS"/>
    <gapJunction id="gap_junction021" conductance="0.345378nS"/>
    <gapJunction id="gap_junction022" conductance="2.408405nS"/>
    <gapJunction id="gap_junction023" conductance="0.792531nS"/>
    <gapJunction id="gap_junction024" conductance="0.686631nS"/>
    <gapJunction id="gap_junction025" conductance="0.638682nS"/>
    <gapJunction id="gap_junction026" conductance="0.100371nS"/>
    <gapJunction id="gap_junction027" conductance="0.124487nS"/>
    <gapJunction id="gap_junction028" conductance="0.232298nS"/>
    <gapJunction id="gap_junction029" conductance="3.144306nS"/>
    <gapJunction id="gap_junction030" conductance="0.809695nS"/>
    <gapJunction id="gap_junction031" conductance="0.388994nS"/>
    <gapJunction id="gap_junction032" conductance="1.240888nS"/>
    <gapJunction id="gap_junction033" conductance="0.705354nS"/>
    <gapJunction id="gap_junction034" conductance="1.451178nS"/>
    <gapJunction id="gap_junction035" conductance="1.209222nS"/>
    <gapJunction id="gap_junction036" conductance="0.622401nS"/>
    <gapJunction id="gap_junction037" conductance="1.291512nS"/>
    <gapJunction id="gap_junction038" conductance="0.520314nS"/>
    <gapJunction id="gap_junction039" conductance="0.200526nS"/>
    <gapJunction id="gap_junction040" conductance="0.269788nS"/>
    <gapJunction id="gap_junction041" conductance="0.223343nS"/>
    <gapJunction id="gap_junction042" conductance="0.313432nS"/>
    <gapJunction id="gap_junction043" conductance="0.610288nS"/>
    <gapJunction id="gap_junction044" conductance="0.091865nS"/>
    <gapJunction id="gap_junction045" conductance="0.578495nS"/>
    <gapJunction id="gap_junction046" conductance="0.288102nS"/>
    <gapJunction id="gap_junction047" conductance="0.623355nS"/>
    <gapJunction id="gap_junction048" conductance="0.135199nS"/>
    <gapJunction id="gap_junction049" conductance="0.258731nS"/>
    <gapJunction id="gap_junction050" conductance="0.431742nS"/>
    <gapJunction id="gap_junction051" conductance="1.136003nS"/>
    <gapJunction id="gap_junction052" conductance="0.910430nS"/>
    <gapJunction id="gap_junction053" conductance="0.759413nS"/>
    <gapJunction id="gap_junction054" conductance="0.479829nS"/>
    <gapJunction id="gap_junction055" conductance="0.352577nS"/>
    <gapJunction id="gap_junction056" conductance="0.430851nS"/>
    <gapJunction id="gap_junction057" conductance="0.606131nS"/>
    <gapJunction id="gap_junction058" conductance="0.501457nS"/>
    <gapJunction id="gap_junction059" conductance="1.401710nS"/>
    <gapJunction id="gap_junction060" conductance="0.140403nS"/>
    <gapJunction id="gap_junction061" conductance="0.508543nS"/>
    <gapJunction id="gap_junction062" conductance="0.327156nS"/>
    <gapJunction id="gap_junction063" conductance="0.625046nS"/>
    <gapJunction id="gap_junction064" conductance="0.947270nS"/>
    <gapJunction id="gap_junction065" conductance="0.347369nS"/>
    <gapJunction id="gap_junction066" conductance="1.204319nS"/>
    <gapJunction id="gap_junction067" conductance="0.152188nS"/>
    <gapJunction id="gap_junction068" conductance="0.703481nS"/>
    <gapJunction id="gap_junction069" conductance="0.158724nS"/>
    <gapJunction id="gap_junction070" conductance="0.151062nS"/>
    <gapJunction id="gap_junction071" conductance="0.408792nS"/>
    <gapJunction id="gap_junction072" conductance="0.463659nS"/>
    <gapJunction id="gap_junction073" conductance="0.417284nS"/>
    <gapJunction id="gap_junction074" conductance="0.297049nS"/>
    <gapJunction id="gap_junction075" conductance="0.146823nS"/>
    <gapJunction id="gap_junction076" conductance="0.418795nS"/>
    <gapJunction id="gap_junction077" conductance="0.360115nS"/>
    <gapJunction id="gap_junction078" conductance="0.501352nS"/>
    <gapJunction id="gap_junction079" conductance="1.412117nS"/>
    <gapJunction id="gap_junction080" conductance="0.561550nS"/>
    <gapJunction id="gap_junction081" conductance="1.167772nS"/>
    <gapJunction id="gap_junction082" conductance="1.357786nS"/>
    <gapJunction id="gap_junction083" conductance="1.545038nS"/>
    <gapJunction id="gap_junction084" conductance="0.467819nS"/>
    <gapJunction id="gap_junction085" conductance="0.545482nS"/>
    <gapJunction id="gap_junction086" conductance="5.059770nS"/>
    <gapJunction id="gap_junction087" conductance="2.967724nS"/>
    <gapJunction id="gap_junction088" conductance="0.748781nS"/>
    <gapJunction id="gap_junction089" conductance="0.573605nS"/>
    <gapJunction id="gap_junction090" conductance="0.820985nS"/>
    <gapJunction id="gap_junction091" conductance="0.364821nS"/>
    <gapJunction id="gap_junction092" conductance="2.489376nS"/>
    <gapJunction id="gap_junction093" conductance="2.185270nS"/>
    <gapJunction id="gap_junction094" conductance="0.495074nS"/>
    <gapJunction id="gap_junction095" conductance="0.797328nS"/>
    <gapJunction id="gap_junction096" conductance="0.803651nS"/>
    <gapJunction id="gap_junction097" conductance="0.150126nS"/>
    <gapJunction id="gap_junction098" conductance="1.810493nS"/>
    <gapJunction id="gap_junction099" conductance="0.924704nS"/>
    <gapJunction id="gap_junction0100" conductance="0.299520nS"/>
    <gapJunction id="gap_junction0101" conductance="0.208297nS"/>
    <gapJunction id="gap_junction0102" conductance="0.929857nS"/>
    <gapJunction id="gap_junction0103" conductance="0.730694nS"/>
    <gapJunction id="gap_junction0104" conductance="0.420108nS"/>
    <gapJunction id="gap_junction0105" conductance="0.250864nS"/>
    <gapJunction id="gap_junction0106" conductance="0.520545nS"/>
    <gapJunction id="gap_junction0107" conductance="0.864235nS"/>
    <gapJunction id="gap_junction0108" conductance="0.386994nS"/>
    <gapJunction id="gap_junction0109" conductance="0.564744nS"/>
    <gapJunction id="gap_junction0110" conductance="1.473887nS"/>
    <gapJunction id="gap_junction0111" conductance="0.473556nS"/>
    <gapJunction id="gap_junction0112" conductance="0.418614nS"/>
    <gapJunction id="gap_junction0113" conductance="1.009780nS"/>
    <gapJunction id="gap_junction0114" conductance="0.355051nS"/>
    <gapJunction id="gap_junction0115" conductance="0.640782nS"/>
    <gapJunction id="gap_junction0116" conductance="1.345510nS"/>
    <gapJunction id="gap_junction0117" conductance="0.782173nS"/>
    <gapJunction id="gap_junction0118" conductance="0.927902nS"/>
    <gapJunction id="gap_junction0119" conductance="0.915191nS"/>
    <gapJunction id="gap_junction0120" conductance="0.269154nS"/>
    <gapJunction id="gap_junction0121" conductance="0.389342nS"/>
    <gapJunction id="gap_junction0122" conductance="0.427760nS"/>
    <gapJunction id="gap_junction0123" conductance="1.433565nS"/>
    <gapJunction id="gap_junction0124" conductance="1.114432nS"/>
    <gapJunction id="gap_junction0125" conductance="0.104282nS"/>
    <gapJunction id="gap_junction0126" conductance="0.739434nS"/>
    <gapJunction id="gap_junction0127" conductance="0.712212nS"/>
    <gapJunction id="gap_junction0128" conductance="0.208453nS"/>
    <gapJunction id="gap_junction0129" conductance="0.842743nS"/>
    <gapJunction id="gap_junction0130" conductance="2.010804nS"/>
    <gapJunction id="gap_junction0131" conductance="0.287790nS"/>
    <gapJunction id="gap_junction0132" conductance="0.163851nS"/>
    <gapJunction id="gap_junction0133" conductance="0.711421nS"/>
    <gapJunction id="gap_junction0134" conductance="0.484585nS"/>
    <gapJunction id="gap_junction0135" conductance="1.333355nS"/>
    <gapJunction id="gap_junction0136" conductance="0.201670nS"/>
    <gapJunction id="gap_junction0137" conductance="0.114171nS"/>
    <gapJunction id="gap_junction0138" conductance="1.291014nS"/>
    <gapJunction id="gap_junction0139" conductance="0.548962nS"/>
    <gapJunction id="gap_junction0140" conductance="0.347463nS"/>
    <gapJunction id="gap_junction0141" conductance="0.161274nS"/>
    <gapJunction id="gap_junction0142" conductance="0.479684nS"/>
    <gapJunction id="gap_junction0143" conductance="0.489717nS"/>
    <gapJunction id="gap_junction0144" conductance="0.627589nS"/>
    <gapJunction id="gap_junction0145" conductance="0.940372nS"/>
    <gapJunction id="gap_junction0146" conductance="0.647735nS"/>
    <gapJunction id="gap_junction0147" conductance="1.063644nS"/>
    <gapJunction id="gap_junction0148" conductance="0.416577nS"/>
    <gapJunction id="gap_junction0149" conductance="1.415741nS"/>
    <gapJunction id="gap_junction0150" conductance="0.609982nS"/>
    <gapJunction id="gap_junction0151" conductance="1.400649nS"/>
    <gapJunction id="gap_junction0152" conductance="1.717505nS"/>
    <gapJunction id="gap_junction0153" conductance="0.612642nS"/>
    <gapJunction id="gap_junction0154" conductance="1.086372nS"/>
    <gapJunction id="gap_junction0155" conductance="0.583301nS"/>
    <gapJunction id="gap_junction0156" conductance="0.110910nS"/>
    <gapJunction id="gap_junction0157" conductance="0.241325nS"/>
    <gapJunction id="gap_junction0158" conductance="0.343835nS"/>
    <gapJunction id="gap_junction0159" conductance="0.340839nS"/>
    <gapJunction id="gap_junction0160" conductance="0.256371nS"/>
    <gapJunction id="gap_junction0161" conductance="0.241283nS"/>
    <gapJunction id="gap_junction0162" conductance="3.417041nS"/>
    <gapJunction id="gap_junction0163" conductance="0.298996nS"/>
    <gapJunction id="gap_junction0164" conductance="0.266520nS"/>
    <gapJunction id="gap_junction0165" conductance="1.899157nS"/>
    <gapJunction id="gap_junction0166" conductance="0.503914nS"/>
    <gapJunction id="gap_junction0167" conductance="0.661470nS"/>
    <gapJunction id="gap_junction0168" conductance="1.125711nS"/>
    <gapJunction id="gap_junction0169" conductance="0.451132nS"/>
    <gapJunction id="gap_junction0170" conductance="0.933120nS"/>
    <gapJunction id="gap_junction0171" conductance="1.190840nS"/>
    <gapJunction id="gap_junction0172" conductance="0.380965nS"/>
    <gapJunction id="gap_junction0173" conductance="0.355479nS"/>
    <gapJunction id="gap_junction0174" conductance="0.239069nS"/>
    <gapJunction id="gap_junction0175" conductance="0.216498nS"/>
    <gapJunction id="gap_junction0176" conductance="1.563554nS"/>
    <gapJunction id="gap_junction0177" conductance="0.203009nS"/>
    <gapJunction id="gap_junction0178" conductance="0.760744nS"/>
    <gapJunction id="gap_junction0179" conductance="0.298725nS"/>
    <gapJunction id="gap_junction0180" conductance="0.574940nS"/>
    <gapJunction id="gap_junction0181" conductance="0.421031nS"/>
    <gapJunction id="gap_junction0182" conductance="0.903240nS"/>
    <gapJunction id="gap_junction0183" conductance="0.479898nS"/>
    <gapJunction id="gap_junction0184" conductance="0.200641nS"/>
    <gapJunction id="gap_junction0185" conductance="1.702802nS"/>
    <gapJunction id="gap_junction0186" conductance="0.567665nS"/>
    <gapJunction id="gap_junction0187" conductance="2.031154nS"/>
    <gapJunction id="gap_junction0188" conductance="1.062195nS"/>
    <gapJunction id="gap_junction0189" conductance="0.128041nS"/>
    <pulseGenerator id="Pulse_vrpop0_Golgi_pop0_0" delay="0.000000ms" duration="3000.000000ms" amplitude="-13.524323pA"/>
    <pulseGenerator id="Pulse_vrpop0_Golgi_pop0_1" delay="0.000000ms" duration="3000.000000ms" amplitude="-11.242457pA"/>
    <pulseGenerator id="Pulse_vrpop0_Golgi_pop0_2" delay="0.000000ms" duration="3000.000000ms" amplitude="-49.301277pA"/>
    <pulseGenerator id="Pulse_vrpop0_Golgi_pop0_3" delay="0.000000ms" duration="3000.000000ms" amplitude="41.558257pA"/>
    <pulseGenerator id="Pulse_vrpop0_Golgi_pop0_4" delay="0.000000ms" duration="3000.000000ms" amplitude="23.723653pA"/>
    <pulseGenerator id="Pulse_vrpop0_Golgi_pop0_5" delay="0.000000ms" duration="3000.000000ms" amplitude="39.537739pA"/>
    <pulseGenerator id="Pulse_vrpop0_Golgi_pop0_6" delay="0.000000ms" duration="3000.000000ms" amplitude="14.775454pA"/>
    <pulseGenerator id="Pulse_vrpop0_Golgi_pop0_7" delay="0.000000ms" duration="3000.000000ms" amplitude="1.887185pA"/>
    <pulseGenerator id="Pulse_vrpop0_Golgi_pop0_8" delay="0.000000ms" duration="3000.000000ms" amplitude="19.984024pA"/>
    <pulseGenerator id="Pulse_vrpop0_Golgi_pop0_9" delay="0.000000ms" duration="3000.000000ms" amplitude="62.436279pA"/>
    <pulseGenerator id="Pulse_vrpop0_Golgi_pop0_10" delay="0.000000ms" duration="3000.000000ms" amplitude="32.893850pA"/>
    <pulseGenerator id="Pulse_vrpop0_Golgi_pop0_11" delay="0.000000ms" duration="3000.000000ms" amplitude="40.518954pA"/>
    <pulseGenerator id="Pulse_vrpop0_Golgi_pop0_12" delay="0.000000ms" duration="3000.000000ms" amplitude="31.017765pA"/>
    <pulseGenerator id="Pulse_vrpop0_Golgi_pop0_13" delay="0.000000ms" duration="3000.000000ms" amplitude="-36.671167pA"/>
    <pulseGenerator id="Pulse_vrpop0_Golgi_pop0_14" delay="0.000000ms" duration="3000.000000ms" amplitude="-33.329989pA"/>
    <pulseGenerator id="Pulse_vrpop0_Golgi_pop0_15" delay="0.000000ms" duration="3000.000000ms" amplitude="-42.416356pA"/>
    <pulseGenerator id="Pulse_vrpop0_Golgi_pop0_16" delay="0.000000ms" duration="3000.000000ms" amplitude="52.907746pA"/>
    <pulseGenerator id="Pulse_vrpop0_Golgi_pop0_17" delay="0.000000ms" duration="3000.000000ms" amplitude="-6.761599pA"/>
    <pulseGenerator id="Pulse_vrpop0_Golgi_pop0_18" delay="0.000000ms" duration="3000.000000ms" amplitude="-31.307233pA"/>
    <pulseGenerator id="Pulse_vrpop0_Golgi_pop0_19" delay="0.000000ms" duration="3000.000000ms" amplitude="-59.754004pA"/>
    <pulseGenerator id="Pulse_vrpop0_Golgi_pop0_20" delay="0.000000ms" duration="3000.000000ms" amplitude="11.065196pA"/>
    <pulseGenerator id="Pulse_vrpop0_Golgi_pop0_21" delay="0.000000ms" duration="3000.000000ms" amplitude="18.982454pA"/>
    <pulseGenerator id="Pulse_vrpop0_Golgi_pop0_22" delay="0.000000ms" duration="3000.000000ms" amplitude="63.573179pA"/>
    <pulseGenerator id="Pulse_vrpop0_Golgi_pop0_23" delay="0.000000ms" duration="3000.000000ms" amplitude="69.923213pA"/>
    <pulseGenerator id="Pulse_vrpop0_Golgi_pop0_24" delay="0.000000ms" duration="3000.000000ms" amplitude="6.739551pA"/>
    <pulseGenerator id="Pulse_vrpop0_Golgi_pop0_25" delay="0.000000ms" duration="3000.000000ms" amplitude="15.872812pA"/>
    <pulseGenerator id="Pulse_vrpop0_Golgi_pop0_26" delay="0.000000ms" duration="3000.000000ms" amplitude="51.601701pA"/>
    <pulseGenerator id="Pulse_vrpop0_Golgi_pop0_27" delay="0.000000ms" duration="3000.000000ms" amplitude="-42.640383pA"/>
    <pulseGenerator id="Pulse_vrpop0_Golgi_pop0_28" delay="0.000000ms" duration="3000.000000ms" amplitude="-11.196464pA"/>
    <pulseGenerator id="Pulse_vrpop0_Golgi_pop0_29" delay="0.000000ms" duration="3000.000000ms" amplitude="-1.625827pA"/>
    <pulseGenerator id="Pulse_vrpop0_Golgi_pop0_30" delay="0.000000ms" duration="3000.000000ms" amplitude="-2.671513pA"/>
    <pulseGenerator id="Pulse_vrpop0_Golgi_pop0_31" delay="0.000000ms" duration="3000.000000ms" amplitude="1.937593pA"/>
    <pulseGenerator id="Pulse_vrpop0_Golgi_pop0_32" delay="0.000000ms" duration="3000.000000ms" amplitude="-11.771398pA"/>
    <pulseGenerator id="Pulse_vrpop0_Golgi_pop0_33" delay="0.000000ms" duration="3000.000000ms" amplitude="-8.973534pA"/>
    <pulseGenerator id="Pulse_vrpop0_Golgi_pop0_34" delay="0.000000ms" duration="3000.000000ms" amplitude="10.737895pA"/>
    <pulseGenerator id="Pulse_vrpop0_Golgi_pop0_35" delay="0.000000ms" duration="3000.000000ms" amplitude="-71.601213pA"/>
    <pulseGenerator id="Pulse_vrpop0_Golgi_pop0_36" delay="0.000000ms" duration="3000.000000ms" amplitude="90.864929pA"/>
    <pulseGenerator id="Pulse_vrpop0_Golgi_pop0_37" delay="0.000000ms" duration="3000.000000ms" amplitude="-42.320392pA"/>
    <pulseGenerator id="Pulse_vrpop0_Golgi_pop0_38" delay="0.000000ms" duration="3000.000000ms" amplitude="-11.090777pA"/>
    <pulseGenerator id="Pulse_vrpop0_Golgi_pop0_39" delay="0.000000ms" duration="3000.000000ms" amplitude="-45.062944pA"/>
    <pulseGenerator id="Pulse_vrpop0_Golgi_pop0_40" delay="0.000000ms" duration="3000.000000ms" amplitude="-11.299466pA"/>
    <pulseGenerator id="Pulse_vrpop0_Golgi_pop0_41" delay="0.000000ms" duration="3000.000000ms" amplitude="-35.940036pA"/>
    <pulseGenerator id="Pulse_vrpop0_Golgi_pop0_42" delay="0.000000ms" duration="3000.000000ms" amplitude="-38.380953pA"/>
    <pulseGenerator id="Pulse_vrpop0_Golgi_pop0_43" delay="0.000000ms" duration="3000.000000ms" amplitude="-67.452383pA"/>
    <pulseGenerator id="Pulse_vrpop0_Golgi_pop0_44" delay="0.000000ms" duration="3000.000000ms" amplitude="0.471890pA"/>
    <pulseGenerator id="Pulse_vrpop0_Golgi_pop0_45" delay="0.000000ms" duration="3000.000000ms" amplitude="7.840159pA"/>
    <pulseGenerator id="Pulse_vrpop0_Golgi_pop0_46" delay="0.000000ms" duration="3000.000000ms" amplitude="-44.352483pA"/>
    <pulseGenerator id="Pulse_vrpop0_Golgi_pop0_47" delay="0.000000ms" duration="3000.000000ms" amplitude="43.255952pA"/>
    <pulseGenerator id="Pulse_vrpop0_Golgi_pop0_48" delay="0.000000ms" duration="3000.000000ms" amplitude="-28.582772pA"/>
    <pulseGenerator id="Pulse_vrpop0_Golgi_pop0_49" delay="0.000000ms" duration="3000.000000ms" amplitude="45.684500pA"/>
    <pulseGenerator id="Pulse_vrpop0_Golgi_pop0_50" delay="0.000000ms" duration="3000.000000ms" amplitude="-39.159521pA"/>
    <pulseGenerator id="Pulse_vrpop0_Golgi_pop0_51" delay="0.000000ms" duration="3000.000000ms" amplitude="59.047469pA"/>
    <pulseGenerator id="Pulse_vrpop0_Golgi_pop0_52" delay="0.000000ms" duration="3000.000000ms" amplitude="4.871793pA"/>
    <pulseGenerator id="Pulse_vrpop0_Golgi_pop0_53" delay="0.000000ms" duration="3000.000000ms" amplitude="17.627297pA"/>
    <pulseGenerator id="Pulse_vrpop0_Golgi_pop0_54" delay="0.000000ms" duration="3000.000000ms" amplitude="-21.318544pA"/>
    <pulseGenerator id="Pulse_vrpop0_Golgi_pop0_55" delay="0.000000ms" duration="3000.000000ms" amplitude="-20.841771pA"/>
    <pulseGenerator id="Pulse_vrpop0_Golgi_pop0_56" delay="0.000000ms" duration="3000.000000ms" amplitude="-22.105999pA"/>
    <pulseGenerator id="Pulse_vrpop0_Golgi_pop0_57" delay="0.000000ms" duration="3000.000000ms" amplitude="-38.333852pA"/>
    <pulseGenerator id="Pulse_vrpop0_Golgi_pop0_58" delay="0.000000ms" duration="3000.000000ms" amplitude="-70.009948pA"/>
    <pulseGenerator id="Pulse_vrpop0_Golgi_pop0_59" delay="0.000000ms" duration="3000.000000ms" amplitude="-44.939167pA"/>
    <pulseGenerator id="Pulse_vrpop0_Golgi_pop0_60" delay="0.000000ms" duration="3000.000000ms" amplitude="15.944931pA"/>
    <pulseGenerator id="Pulse_vrpop0_Golgi_pop0_61" delay="0.000000ms" duration="3000.000000ms" amplitude="-19.921140pA"/>
    <pulseGenerator id="Pulse_vrpop0_Golgi_pop0_62" delay="0.000000ms" duration="3000.000000ms" amplitude="-25.447379pA"/>
    <pulseGenerator id="Pulse_vrpop0_Golgi_pop0_63" delay="0.000000ms" duration="3000.000000ms" amplitude="-9.398088pA"/>
    <pulseGenerator id="Pulse_vrpop0_Golgi_pop0_64" delay="0.000000ms" duration="3000.000000ms" amplitude="18.929768pA"/>
    <pulseGenerator id="Pulse_vrpop0_Golgi_pop0_65" delay="0.000000ms" duration="3000.000000ms" amplitude="-18.984366pA"/>
    <pulseGenerator id="Pulse_vrpop0_Golgi_pop0_66" delay="0.000000ms" duration="3000.000000ms" amplitude="12.749092pA"/>
    <pulseGenerator id="Pulse_vrpop0_Golgi_pop0_67" delay="0.000000ms" duration="3000.000000ms" amplitude="-43.499946pA"/>
    <pulseGenerator id="Pulse_vrpop0_Golgi_pop0_68" delay="0.000000ms" duration="3000.000000ms" amplitude="5.039991pA"/>
    <pulseGenerator id="Pulse_vrpop0_Golgi_pop0_69" delay="0.000000ms" duration="3000.000000ms" amplitude="3.836016pA"/>
    <pulseGenerator id="Pulse_vrpop0_Golgi_pop0_70" delay="0.000000ms" duration="3000.000000ms" amplitude="45.099951pA"/>
    <pulseGenerator id="Pulse_vrpop0_Golgi_pop0_71" delay="0.000000ms" duration="3000.000000ms" amplitude="102.404116pA"/>
    <pulseGenerator id="Pulse_vrpop0_Golgi_pop0_72" delay="0.000000ms" duration="3000.000000ms" amplitude="72.752874pA"/>
    <poissonFiringSynapse id="XFpop0b_PF_Golgi_pop0_syn0" synapse="PF" averageRate="2.000000 per_s" spikeTarget="./PF"/>
    <poissonFiringSynapse id="XFpop0b_PF_Golgi_pop0_syn1" synapse="PF" averageRate="0.500000 per_s" spikeTarget="./PF"/>
    <transientPoissonFiringSynapse id="XFpop0l_PF_Golgi_pop0_syn0" delay="600.000000ms" duration="10.000000ms" synapse="PF" averageRate="200.000000 per_s" spikeTarget="./PF"/>
    <transientPoissonFiringSynapse id="XFpop0l_PF_Golgi_pop0_syn1" delay="610.000000ms" duration="15.000000ms" synapse="PF" averageRate="350.000000 per_s" spikeTarget="./PF"/>
    <transientPoissonFiringSynapse id="XFpop0m_PF_Golgi_pop0_syn0" delay="825.000000ms" duration="10.000000ms" synapse="PF" averageRate="200.000000 per_s" spikeTarget="./PF"/>
    <transientPoissonFiringSynapse id="XFpop0m_PF_Golgi_pop0_syn1" delay="835.000000ms" duration="15.000000ms" synapse="PF" averageRate="350.000000 per_s" spikeTarget="./PF"/>
    <transientPoissonFiringSynapse id="XFpop0r_PF_Golgi_pop0_syn0" delay="1050.000000ms" duration="10.000000ms" synapse="PF" averageRate="200.000000 per_s" spikeTarget="./PF"/>
    <transientPoissonFiringSynapse id="XFpop0r_PF_Golgi_pop0_syn1" delay="1060.000000ms" duration="15.000000ms" synapse="PF" averageRate="350.000000 per_s" spikeTarget="./PF"/>
    <network id="Golgi_V2010_reg_from_ltor_200_no_expThree_trial0_network" type="networkWithTemperature" temperature="23 degC">
        <notes>Parameter arrays for building this network are listed below:
Cell distribution parameters:
{'densityFilePath': '/home/rokas/Golgi_data/Pure NeuG density matrix of shape 69 630.txt', 'dim3': 'z', 'distributionModel': 'density_profile', 'distanceModel': 'random', 'planeDimensions': {'dim2': 'y', 'dim1': 'x'}, 'dim2CoordinateVector': [0, 110], 'dim3Boundary': 100, 'popID': 'Golgi_pop0', 'dim1CoordinateVector': [0, 3000], 'canonicalVolumeBaseAreainMicrons': 25.0318596439065}
Cell population parameters:
Cell population parameters for Golgi_pop0:
{'NeuroML2CellType': 'cell2CaPools', 'popID': 'Golgi_pop0', 'cellType': 'Golgi_10comp_13channels_2CaPoolsT', 'size': 73}
Cell connectivity parameters:
{'testingConductanceScale': 1, 'electricalConnModel': 'Vervaeke_2010_based', 'postPoptargetGroup': {'segmentGroupList': ['apical_dendrite_group', 'basal_dendrite_group'], 'segmentGroupProbabilities': {'basal_dendrite_group': 0.5, 'apical_dendrite_group': 0.5}}, 'units': 'nS', 'normalizeConductances': False, 'spatialScale': 1.0, 'prePopID': 'Golgi_pop0', 'postPopID': 'Golgi_pop0', 'prePoptargetGroup': {'segmentGroupList': ['apical_dendrite_group', 'basal_dendrite_group'], 'segmentGroupProbabilities': {'basal_dendrite_group': 0.5, 'apical_dendrite_group': 0.5}}}
Input parameters for a list of populations:
Input group parameters for Golgi_pop0:
{'stDevAmp': 32, 'inputModel': 'variable_basal_firing_rate', 'ampUnits': 'pA', 'amplitudeDistribution': 'gaussian', 'averageAmp': 0, 'valueOffset': 0, 'inputLabel': 'vrpop0', 'offsetDistribution': 'constant', 'offsetUnits': 'ms'}
{'synapseList': [{'noInputs': 8, 'synapseMode': 'transient', 'segmentGroupProbabilities': {'basal_dendrite_group': 1}, 'synapseType': 'PF', 'duration': 10, 'segmentGroupList': ['basal_dendrite_group'], 'targetingModel': 'segment groups and segments', 'averageRate': 200, 'delay': 600, 'units': 'ms', 'numberModel': 'constant number of inputs per cell'}, {'noInputs': 50, 'synapseMode': 'transient', 'segmentGroupProbabilities': {'apical_dendrite_group': 1}, 'synapseType': 'PF', 'duration': 15, 'segmentGroupList': ['apical_dendrite_group'], 'targetingModel': 'segment groups and segments', 'averageRate': 350, 'delay': 610, 'units': 'ms', 'numberModel': 'constant number of inputs per cell'}], 'inputLabel': 'XFpop0l', 'inputModel': 'XF', 'fractionToTarget': 0.22, 'targetingRegime': '3D_region_specific', 'colocalizeSynapses': False, 'regionList': [{'zVector': [0, 100], 'xVector': [0, 1000], 'yVector': [0, 110]}]}
{'synapseList': [{'noInputs': 8, 'synapseMode': 'transient', 'segmentGroupProbabilities': {'basal_dendrite_group': 1}, 'synapseType': 'PF', 'duration': 10, 'segmentGroupList': ['basal_dendrite_group'], 'targetingModel': 'segment groups and segments', 'averageRate': 200, 'delay': 825, 'units': 'ms', 'numberModel': 'constant number of inputs per cell'}, {'noInputs': 50, 'synapseMode': 'transient', 'segmentGroupProbabilities': {'apical_dendrite_group': 1}, 'synapseType': 'PF', 'duration': 15, 'segmentGroupList': ['apical_dendrite_group'], 'targetingModel': 'segment groups and segments', 'averageRate': 350, 'delay': 835, 'units': 'ms', 'numberModel': 'constant number of inputs per cell'}], 'inputLabel': 'XFpop0m', 'inputModel': 'XF', 'fractionToTarget': 0.22, 'targetingRegime': '3D_region_specific', 'colocalizeSynapses': False, 'regionList': [{'zVector': [0, 100], 'xVector': [1000, 2000], 'yVector': [0, 110]}]}
{'synapseList': [{'noInputs': 8, 'synapseMode': 'transient', 'segmentGroupProbabilities': {'basal_dendrite_group': 1}, 'synapseType': 'PF', 'duration': 10, 'segmentGroupList': ['basal_dendrite_group'], 'targetingModel': 'segment groups and segments', 'averageRate': 200, 'delay': 1050, 'units': 'ms', 'numberModel': 'constant number of inputs per cell'}, {'noInputs': 50, 'synapseMode': 'transient', 'segmentGroupProbabilities': {'apical_dendrite_group': 1}, 'synapseType': 'PF', 'duration': 15, 'segmentGroupList': ['apical_dendrite_group'], 'targetingModel': 'segment groups and segments', 'averageRate': 350, 'delay': 1060, 'units': 'ms', 'numberModel': 'constant number of inputs per cell'}], 'inputLabel': 'XFpop0r', 'inputModel': 'XF', 'fractionToTarget': 0.22, 'targetingRegime': '3D_region_specific', 'colocalizeSynapses': False, 'regionList': [{'zVector': [0, 100], 'xVector': [2000, 3000], 'yVector': [0, 110]}]}
{'synapseList': [{'segmentGroupList': ['basal_dendrite_group'], 'targetingModel': 'segment groups and segments', 'synapseMode': 'persistent', 'averageRate': 2, 'noInputs': 20, 'synapseType': 'PF', 'numberModel': 'constant number of inputs per cell', 'segmentGroupProbabilities': {'basal_dendrite_group': 1}}, {'segmentGroupList': ['apical_dendrite_group'], 'targetingModel': 'segment groups and segments', 'synapseMode': 'persistent', 'averageRate': 0.5, 'noInputs': 100, 'synapseType': 'PF', 'numberModel': 'constant number of inputs per cell', 'segmentGroupProbabilities': {'apical_dendrite_group': 1}}], 'inputLabel': 'XFpop0b', 'inputModel': 'XF', 'fractionToTarget': 1, 'targetingRegime': 'uniform', 'colocalizeSynapses': False}
</notes>
        <population id="Golgi_pop0" type="populationList" component="Golgi_10comp_13channels_2CaPoolsT" size="73">
            <instance id="0">
                <location y="-0.25664347335551" x="1538.582413361661793" z="61.099296044436954"/>
            </instance>
            <instance id="1">
                <location y="1.672218738375648" x="1938.206337159152099" z="37.767079880248524"/>
            </instance>
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        </population>
        <electricalProjection id="proj0" postsynapticPopulation="Golgi_pop0" presynapticPopulation="Golgi_pop0">
            <electricalConnectionInstance id="0" synapse="gap_junction00" preFractionAlong="0.020218" preSegment="10" postFractionAlong="0.141472" postSegment="8" postCell="../Golgi_pop0/3/Golgi_10comp_13channels_2CaPoolsT" preCell="../Golgi_pop0/0/Golgi_10comp_13channels_2CaPoolsT"/>
            <electricalConnectionInstance id="1" synapse="gap_junction01" preFractionAlong="0.132565" preSegment="9" postFractionAlong="0.890088" postSegment="9" postCell="../Golgi_pop0/5/Golgi_10comp_13channels_2CaPoolsT" preCell="../Golgi_pop0/0/Golgi_10comp_13channels_2CaPoolsT"/>
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        </electricalProjection>
        <inputList id="vrpop0_Golgi_pop0_0" component="Pulse_vrpop0_Golgi_pop0_0" population="Golgi_pop0">
            <input destination="synapses" id="0" target="../Golgi_pop0/0/Golgi_10comp_13channels_2CaPoolsT"/>
        </inputList>
        <inputList id="vrpop0_Golgi_pop0_1" component="Pulse_vrpop0_Golgi_pop0_1" population="Golgi_pop0">
            <input destination="synapses" id="1" target="../Golgi_pop0/1/Golgi_10comp_13channels_2CaPoolsT"/>
        </inputList>
        <inputList id="vrpop0_Golgi_pop0_2" component="Pulse_vrpop0_Golgi_pop0_2" population="Golgi_pop0">
            <input destination="synapses" id="2" target="../Golgi_pop0/2/Golgi_10comp_13channels_2CaPoolsT"/>
        </inputList>
        <inputList id="vrpop0_Golgi_pop0_3" component="Pulse_vrpop0_Golgi_pop0_3" population="Golgi_pop0">
            <input destination="synapses" id="3" target="../Golgi_pop0/3/Golgi_10comp_13channels_2CaPoolsT"/>
        </inputList>
        <inputList id="vrpop0_Golgi_pop0_4" component="Pulse_vrpop0_Golgi_pop0_4" population="Golgi_pop0">
            <input destination="synapses" id="4" target="../Golgi_pop0/4/Golgi_10comp_13channels_2CaPoolsT"/>
        </inputList>
        <inputList id="vrpop0_Golgi_pop0_5" component="Pulse_vrpop0_Golgi_pop0_5" population="Golgi_pop0">
            <input destination="synapses" id="5" target="../Golgi_pop0/5/Golgi_10comp_13channels_2CaPoolsT"/>
        </inputList>
        <inputList id="vrpop0_Golgi_pop0_6" component="Pulse_vrpop0_Golgi_pop0_6" population="Golgi_pop0">
            <input destination="synapses" id="6" target="../Golgi_pop0/6/Golgi_10comp_13channels_2CaPoolsT"/>
        </inputList>
        <inputList id="vrpop0_Golgi_pop0_7" component="Pulse_vrpop0_Golgi_pop0_7" population="Golgi_pop0">
            <input destination="synapses" id="7" target="../Golgi_pop0/7/Golgi_10comp_13channels_2CaPoolsT"/>
        </inputList>
        <inputList id="vrpop0_Golgi_pop0_8" component="Pulse_vrpop0_Golgi_pop0_8" population="Golgi_pop0">
            <input destination="synapses" id="8" target="../Golgi_pop0/8/Golgi_10comp_13channels_2CaPoolsT"/>
        </inputList>
        <inputList id="vrpop0_Golgi_pop0_9" component="Pulse_vrpop0_Golgi_pop0_9" population="Golgi_pop0">
            <input destination="synapses" id="9" target="../Golgi_pop0/9/Golgi_10comp_13channels_2CaPoolsT"/>
        </inputList>
        <inputList id="vrpop0_Golgi_pop0_10" component="Pulse_vrpop0_Golgi_pop0_10" population="Golgi_pop0">
            <input destination="synapses" id="10" target="../Golgi_pop0/10/Golgi_10comp_13channels_2CaPoolsT"/>
        </inputList>
        <inputList id="vrpop0_Golgi_pop0_11" component="Pulse_vrpop0_Golgi_pop0_11" population="Golgi_pop0">
            <input destination="synapses" id="11" target="../Golgi_pop0/11/Golgi_10comp_13channels_2CaPoolsT"/>
        </inputList>
        <inputList id="vrpop0_Golgi_pop0_12" component="Pulse_vrpop0_Golgi_pop0_12" population="Golgi_pop0">
            <input destination="synapses" id="12" target="../Golgi_pop0/12/Golgi_10comp_13channels_2CaPoolsT"/>
        </inputList>
        <inputList id="vrpop0_Golgi_pop0_13" component="Pulse_vrpop0_Golgi_pop0_13" population="Golgi_pop0">
            <input destination="synapses" id="13" target="../Golgi_pop0/13/Golgi_10comp_13channels_2CaPoolsT"/>
        </inputList>
        <inputList id="vrpop0_Golgi_pop0_14" component="Pulse_vrpop0_Golgi_pop0_14" population="Golgi_pop0">
            <input destination="synapses" id="14" target="../Golgi_pop0/14/Golgi_10comp_13channels_2CaPoolsT"/>
        </inputList>
        <inputList id="vrpop0_Golgi_pop0_15" component="Pulse_vrpop0_Golgi_pop0_15" population="Golgi_pop0">
            <input destination="synapses" id="15" target="../Golgi_pop0/15/Golgi_10comp_13channels_2CaPoolsT"/>
        </inputList>
        <inputList id="vrpop0_Golgi_pop0_16" component="Pulse_vrpop0_Golgi_pop0_16" population="Golgi_pop0">
            <input destination="synapses" id="16" target="../Golgi_pop0/16/Golgi_10comp_13channels_2CaPoolsT"/>
        </inputList>
        <inputList id="vrpop0_Golgi_pop0_17" component="Pulse_vrpop0_Golgi_pop0_17" population="Golgi_pop0">
            <input destination="synapses" id="17" target="../Golgi_pop0/17/Golgi_10comp_13channels_2CaPoolsT"/>
        </inputList>
        <inputList id="vrpop0_Golgi_pop0_18" component="Pulse_vrpop0_Golgi_pop0_18" population="Golgi_pop0">
            <input destination="synapses" id="18" target="../Golgi_pop0/18/Golgi_10comp_13channels_2CaPoolsT"/>
        </inputList>
        <inputList id="vrpop0_Golgi_pop0_19" component="Pulse_vrpop0_Golgi_pop0_19" population="Golgi_pop0">
            <input destination="synapses" id="19" target="../Golgi_pop0/19/Golgi_10comp_13channels_2CaPoolsT"/>
        </inputList>
        <inputList id="vrpop0_Golgi_pop0_20" component="Pulse_vrpop0_Golgi_pop0_20" population="Golgi_pop0">
            <input destination="synapses" id="20" target="../Golgi_pop0/20/Golgi_10comp_13channels_2CaPoolsT"/>
        </inputList>
        <inputList id="vrpop0_Golgi_pop0_21" component="Pulse_vrpop0_Golgi_pop0_21" population="Golgi_pop0">
            <input destination="synapses" id="21" target="../Golgi_pop0/21/Golgi_10comp_13channels_2CaPoolsT"/>
        </inputList>
        <inputList id="vrpop0_Golgi_pop0_22" component="Pulse_vrpop0_Golgi_pop0_22" population="Golgi_pop0">
            <input destination="synapses" id="22" target="../Golgi_pop0/22/Golgi_10comp_13channels_2CaPoolsT"/>
        </inputList>
        <inputList id="vrpop0_Golgi_pop0_23" component="Pulse_vrpop0_Golgi_pop0_23" population="Golgi_pop0">
            <input destination="synapses" id="23" target="../Golgi_pop0/23/Golgi_10comp_13channels_2CaPoolsT"/>
        </inputList>
        <inputList id="vrpop0_Golgi_pop0_24" component="Pulse_vrpop0_Golgi_pop0_24" population="Golgi_pop0">
            <input destination="synapses" id="24" target="../Golgi_pop0/24/Golgi_10comp_13channels_2CaPoolsT"/>
        </inputList>
        <inputList id="vrpop0_Golgi_pop0_25" component="Pulse_vrpop0_Golgi_pop0_25" population="Golgi_pop0">
            <input destination="synapses" id="25" target="../Golgi_pop0/25/Golgi_10comp_13channels_2CaPoolsT"/>
        </inputList>
        <inputList id="vrpop0_Golgi_pop0_26" component="Pulse_vrpop0_Golgi_pop0_26" population="Golgi_pop0">
            <input destination="synapses" id="26" target="../Golgi_pop0/26/Golgi_10comp_13channels_2CaPoolsT"/>
        </inputList>
        <inputList id="vrpop0_Golgi_pop0_27" component="Pulse_vrpop0_Golgi_pop0_27" population="Golgi_pop0">
            <input destination="synapses" id="27" target="../Golgi_pop0/27/Golgi_10comp_13channels_2CaPoolsT"/>
        </inputList>
        <inputList id="vrpop0_Golgi_pop0_28" component="Pulse_vrpop0_Golgi_pop0_28" population="Golgi_pop0">
            <input destination="synapses" id="28" target="../Golgi_pop0/28/Golgi_10comp_13channels_2CaPoolsT"/>
        </inputList>
        <inputList id="vrpop0_Golgi_pop0_29" component="Pulse_vrpop0_Golgi_pop0_29" population="Golgi_pop0">
            <input destination="synapses" id="29" target="../Golgi_pop0/29/Golgi_10comp_13channels_2CaPoolsT"/>
        </inputList>
        <inputList id="vrpop0_Golgi_pop0_30" component="Pulse_vrpop0_Golgi_pop0_30" population="Golgi_pop0">
            <input destination="synapses" id="30" target="../Golgi_pop0/30/Golgi_10comp_13channels_2CaPoolsT"/>
        </inputList>
        <inputList id="vrpop0_Golgi_pop0_31" component="Pulse_vrpop0_Golgi_pop0_31" population="Golgi_pop0">
            <input destination="synapses" id="31" target="../Golgi_pop0/31/Golgi_10comp_13channels_2CaPoolsT"/>
        </inputList>
        <inputList id="vrpop0_Golgi_pop0_32" component="Pulse_vrpop0_Golgi_pop0_32" population="Golgi_pop0">
            <input destination="synapses" id="32" target="../Golgi_pop0/32/Golgi_10comp_13channels_2CaPoolsT"/>
        </inputList>
        <inputList id="vrpop0_Golgi_pop0_33" component="Pulse_vrpop0_Golgi_pop0_33" population="Golgi_pop0">
            <input destination="synapses" id="33" target="../Golgi_pop0/33/Golgi_10comp_13channels_2CaPoolsT"/>
        </inputList>
        <inputList id="vrpop0_Golgi_pop0_34" component="Pulse_vrpop0_Golgi_pop0_34" population="Golgi_pop0">
            <input destination="synapses" id="34" target="../Golgi_pop0/34/Golgi_10comp_13channels_2CaPoolsT"/>
        </inputList>
        <inputList id="vrpop0_Golgi_pop0_35" component="Pulse_vrpop0_Golgi_pop0_35" population="Golgi_pop0">
            <input destination="synapses" id="35" target="../Golgi_pop0/35/Golgi_10comp_13channels_2CaPoolsT"/>
        </inputList>
        <inputList id="vrpop0_Golgi_pop0_36" component="Pulse_vrpop0_Golgi_pop0_36" population="Golgi_pop0">
            <input destination="synapses" id="36" target="../Golgi_pop0/36/Golgi_10comp_13channels_2CaPoolsT"/>
        </inputList>
        <inputList id="vrpop0_Golgi_pop0_37" component="Pulse_vrpop0_Golgi_pop0_37" population="Golgi_pop0">
            <input destination="synapses" id="37" target="../Golgi_pop0/37/Golgi_10comp_13channels_2CaPoolsT"/>
        </inputList>
        <inputList id="vrpop0_Golgi_pop0_38" component="Pulse_vrpop0_Golgi_pop0_38" population="Golgi_pop0">
            <input destination="synapses" id="38" target="../Golgi_pop0/38/Golgi_10comp_13channels_2CaPoolsT"/>
        </inputList>
        <inputList id="vrpop0_Golgi_pop0_39" component="Pulse_vrpop0_Golgi_pop0_39" population="Golgi_pop0">
            <input destination="synapses" id="39" target="../Golgi_pop0/39/Golgi_10comp_13channels_2CaPoolsT"/>
        </inputList>
        <inputList id="vrpop0_Golgi_pop0_40" component="Pulse_vrpop0_Golgi_pop0_40" population="Golgi_pop0">
            <input destination="synapses" id="40" target="../Golgi_pop0/40/Golgi_10comp_13channels_2CaPoolsT"/>
        </inputList>
        <inputList id="vrpop0_Golgi_pop0_41" component="Pulse_vrpop0_Golgi_pop0_41" population="Golgi_pop0">
            <input destination="synapses" id="41" target="../Golgi_pop0/41/Golgi_10comp_13channels_2CaPoolsT"/>
        </inputList>
        <inputList id="vrpop0_Golgi_pop0_42" component="Pulse_vrpop0_Golgi_pop0_42" population="Golgi_pop0">
            <input destination="synapses" id="42" target="../Golgi_pop0/42/Golgi_10comp_13channels_2CaPoolsT"/>
        </inputList>
        <inputList id="vrpop0_Golgi_pop0_43" component="Pulse_vrpop0_Golgi_pop0_43" population="Golgi_pop0">
            <input destination="synapses" id="43" target="../Golgi_pop0/43/Golgi_10comp_13channels_2CaPoolsT"/>
        </inputList>
        <inputList id="vrpop0_Golgi_pop0_44" component="Pulse_vrpop0_Golgi_pop0_44" population="Golgi_pop0">
            <input destination="synapses" id="44" target="../Golgi_pop0/44/Golgi_10comp_13channels_2CaPoolsT"/>
        </inputList>
        <inputList id="vrpop0_Golgi_pop0_45" component="Pulse_vrpop0_Golgi_pop0_45" population="Golgi_pop0">
            <input destination="synapses" id="45" target="../Golgi_pop0/45/Golgi_10comp_13channels_2CaPoolsT"/>
        </inputList>
        <inputList id="vrpop0_Golgi_pop0_46" component="Pulse_vrpop0_Golgi_pop0_46" population="Golgi_pop0">
            <input destination="synapses" id="46" target="../Golgi_pop0/46/Golgi_10comp_13channels_2CaPoolsT"/>
        </inputList>
        <inputList id="vrpop0_Golgi_pop0_47" component="Pulse_vrpop0_Golgi_pop0_47" population="Golgi_pop0">
            <input destination="synapses" id="47" target="../Golgi_pop0/47/Golgi_10comp_13channels_2CaPoolsT"/>
        </inputList>
        <inputList id="vrpop0_Golgi_pop0_48" component="Pulse_vrpop0_Golgi_pop0_48" population="Golgi_pop0">
            <input destination="synapses" id="48" target="../Golgi_pop0/48/Golgi_10comp_13channels_2CaPoolsT"/>
        </inputList>
        <inputList id="vrpop0_Golgi_pop0_49" component="Pulse_vrpop0_Golgi_pop0_49" population="Golgi_pop0">
            <input destination="synapses" id="49" target="../Golgi_pop0/49/Golgi_10comp_13channels_2CaPoolsT"/>
        </inputList>
        <inputList id="vrpop0_Golgi_pop0_50" component="Pulse_vrpop0_Golgi_pop0_50" population="Golgi_pop0">
            <input destination="synapses" id="50" target="../Golgi_pop0/50/Golgi_10comp_13channels_2CaPoolsT"/>
        </inputList>
        <inputList id="vrpop0_Golgi_pop0_51" component="Pulse_vrpop0_Golgi_pop0_51" population="Golgi_pop0">
            <input destination="synapses" id="51" target="../Golgi_pop0/51/Golgi_10comp_13channels_2CaPoolsT"/>
        </inputList>
        <inputList id="vrpop0_Golgi_pop0_52" component="Pulse_vrpop0_Golgi_pop0_52" population="Golgi_pop0">
            <input destination="synapses" id="52" target="../Golgi_pop0/52/Golgi_10comp_13channels_2CaPoolsT"/>
        </inputList>
        <inputList id="vrpop0_Golgi_pop0_53" component="Pulse_vrpop0_Golgi_pop0_53" population="Golgi_pop0">
            <input destination="synapses" id="53" target="../Golgi_pop0/53/Golgi_10comp_13channels_2CaPoolsT"/>
        </inputList>
        <inputList id="vrpop0_Golgi_pop0_54" component="Pulse_vrpop0_Golgi_pop0_54" population="Golgi_pop0">
            <input destination="synapses" id="54" target="../Golgi_pop0/54/Golgi_10comp_13channels_2CaPoolsT"/>
        </inputList>
        <inputList id="vrpop0_Golgi_pop0_55" component="Pulse_vrpop0_Golgi_pop0_55" population="Golgi_pop0">
            <input destination="synapses" id="55" target="../Golgi_pop0/55/Golgi_10comp_13channels_2CaPoolsT"/>
        </inputList>
        <inputList id="vrpop0_Golgi_pop0_56" component="Pulse_vrpop0_Golgi_pop0_56" population="Golgi_pop0">
            <input destination="synapses" id="56" target="../Golgi_pop0/56/Golgi_10comp_13channels_2CaPoolsT"/>
        </inputList>
        <inputList id="vrpop0_Golgi_pop0_57" component="Pulse_vrpop0_Golgi_pop0_57" population="Golgi_pop0">
            <input destination="synapses" id="57" target="../Golgi_pop0/57/Golgi_10comp_13channels_2CaPoolsT"/>
        </inputList>
        <inputList id="vrpop0_Golgi_pop0_58" component="Pulse_vrpop0_Golgi_pop0_58" population="Golgi_pop0">
            <input destination="synapses" id="58" target="../Golgi_pop0/58/Golgi_10comp_13channels_2CaPoolsT"/>
        </inputList>
        <inputList id="vrpop0_Golgi_pop0_59" component="Pulse_vrpop0_Golgi_pop0_59" population="Golgi_pop0">
            <input destination="synapses" id="59" target="../Golgi_pop0/59/Golgi_10comp_13channels_2CaPoolsT"/>
        </inputList>
        <inputList id="vrpop0_Golgi_pop0_60" component="Pulse_vrpop0_Golgi_pop0_60" population="Golgi_pop0">
            <input destination="synapses" id="60" target="../Golgi_pop0/60/Golgi_10comp_13channels_2CaPoolsT"/>
        </inputList>
        <inputList id="vrpop0_Golgi_pop0_61" component="Pulse_vrpop0_Golgi_pop0_61" population="Golgi_pop0">
            <input destination="synapses" id="61" target="../Golgi_pop0/61/Golgi_10comp_13channels_2CaPoolsT"/>
        </inputList>
        <inputList id="vrpop0_Golgi_pop0_62" component="Pulse_vrpop0_Golgi_pop0_62" population="Golgi_pop0">
            <input destination="synapses" id="62" target="../Golgi_pop0/62/Golgi_10comp_13channels_2CaPoolsT"/>
        </inputList>
        <inputList id="vrpop0_Golgi_pop0_63" component="Pulse_vrpop0_Golgi_pop0_63" population="Golgi_pop0">
            <input destination="synapses" id="63" target="../Golgi_pop0/63/Golgi_10comp_13channels_2CaPoolsT"/>
        </inputList>
        <inputList id="vrpop0_Golgi_pop0_64" component="Pulse_vrpop0_Golgi_pop0_64" population="Golgi_pop0">
            <input destination="synapses" id="64" target="../Golgi_pop0/64/Golgi_10comp_13channels_2CaPoolsT"/>
        </inputList>
        <inputList id="vrpop0_Golgi_pop0_65" component="Pulse_vrpop0_Golgi_pop0_65" population="Golgi_pop0">
            <input destination="synapses" id="65" target="../Golgi_pop0/65/Golgi_10comp_13channels_2CaPoolsT"/>
        </inputList>
        <inputList id="vrpop0_Golgi_pop0_66" component="Pulse_vrpop0_Golgi_pop0_66" population="Golgi_pop0">
            <input destination="synapses" id="66" target="../Golgi_pop0/66/Golgi_10comp_13channels_2CaPoolsT"/>
        </inputList>
        <inputList id="vrpop0_Golgi_pop0_67" component="Pulse_vrpop0_Golgi_pop0_67" population="Golgi_pop0">
            <input destination="synapses" id="67" target="../Golgi_pop0/67/Golgi_10comp_13channels_2CaPoolsT"/>
        </inputList>
        <inputList id="vrpop0_Golgi_pop0_68" component="Pulse_vrpop0_Golgi_pop0_68" population="Golgi_pop0">
            <input destination="synapses" id="68" target="../Golgi_pop0/68/Golgi_10comp_13channels_2CaPoolsT"/>
        </inputList>
        <inputList id="vrpop0_Golgi_pop0_69" component="Pulse_vrpop0_Golgi_pop0_69" population="Golgi_pop0">
            <input destination="synapses" id="69" target="../Golgi_pop0/69/Golgi_10comp_13channels_2CaPoolsT"/>
        </inputList>
        <inputList id="vrpop0_Golgi_pop0_70" component="Pulse_vrpop0_Golgi_pop0_70" population="Golgi_pop0">
            <input destination="synapses" id="70" target="../Golgi_pop0/70/Golgi_10comp_13channels_2CaPoolsT"/>
        </inputList>
        <inputList id="vrpop0_Golgi_pop0_71" component="Pulse_vrpop0_Golgi_pop0_71" population="Golgi_pop0">
            <input destination="synapses" id="71" target="../Golgi_pop0/71/Golgi_10comp_13channels_2CaPoolsT"/>
        </inputList>
        <inputList id="vrpop0_Golgi_pop0_72" component="Pulse_vrpop0_Golgi_pop0_72" population="Golgi_pop0">
            <input destination="synapses" id="72" target="../Golgi_pop0/72/Golgi_10comp_13channels_2CaPoolsT"/>
        </inputList>
        <inputList id="List_XFpop0l_PF_Golgi_pop0_syn0" component="XFpop0l_PF_Golgi_pop0_syn0" population="Golgi_pop0">
            <input fractionAlong="0.020218" destination="synapses" id="0" segmentId="10" target="../Golgi_pop0/37/Golgi_10comp_13channels_2CaPoolsT"/>
            <input fractionAlong="0.141472" destination="synapses" id="1" segmentId="10" target="../Golgi_pop0/37/Golgi_10comp_13channels_2CaPoolsT"/>
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        </inputList>
        <inputList id="List_XFpop0l_PF_Golgi_pop0_syn1" component="XFpop0l_PF_Golgi_pop0_syn1" population="Golgi_pop0">
            <input fractionAlong="0.083968" destination="synapses" id="0" segmentId="4" target="../Golgi_pop0/37/Golgi_10comp_13channels_2CaPoolsT"/>
            <input fractionAlong="0.292981" destination="synapses" id="1" segmentId="6" target="../Golgi_pop0/37/Golgi_10comp_13channels_2CaPoolsT"/>
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        </inputList>
        <inputList id="List_XFpop0m_PF_Golgi_pop0_syn0" component="XFpop0m_PF_Golgi_pop0_syn0" population="Golgi_pop0">
            <input fractionAlong="0.861738" destination="synapses" id="0" segmentId="10" target="../Golgi_pop0/46/Golgi_10comp_13channels_2CaPoolsT"/>
            <input fractionAlong="0.979770" destination="synapses" id="1" segmentId="10" target="../Golgi_pop0/46/Golgi_10comp_13channels_2CaPoolsT"/>
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        </inputList>
        <inputList id="List_XFpop0m_PF_Golgi_pop0_syn1" component="XFpop0m_PF_Golgi_pop0_syn1" population="Golgi_pop0">
            <input fractionAlong="0.957426" destination="synapses" id="0" segmentId="3" target="../Golgi_pop0/46/Golgi_10comp_13channels_2CaPoolsT"/>
            <input fractionAlong="0.488317" destination="synapses" id="1" segmentId="3" target="../Golgi_pop0/46/Golgi_10comp_13channels_2CaPoolsT"/>
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        </inputList>
        <inputList id="List_XFpop0r_PF_Golgi_pop0_syn0" component="XFpop0r_PF_Golgi_pop0_syn0" population="Golgi_pop0">
            <input fractionAlong="0.102675" destination="synapses" id="0" segmentId="9" target="../Golgi_pop0/41/Golgi_10comp_13channels_2CaPoolsT"/>
            <input fractionAlong="0.735516" destination="synapses" id="1" segmentId="9" target="../Golgi_pop0/41/Golgi_10comp_13channels_2CaPoolsT"/>
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        </inputList>
        <inputList id="List_XFpop0r_PF_Golgi_pop0_syn1" component="XFpop0r_PF_Golgi_pop0_syn1" population="Golgi_pop0">
            <input fractionAlong="0.834415" destination="synapses" id="0" segmentId="3" target="../Golgi_pop0/41/Golgi_10comp_13channels_2CaPoolsT"/>
            <input fractionAlong="0.664464" destination="synapses" id="1" segmentId="3" target="../Golgi_pop0/41/Golgi_10comp_13channels_2CaPoolsT"/>
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        </inputList>
        <inputList id="List_XFpop0b_PF_Golgi_pop0_syn0" component="XFpop0b_PF_Golgi_pop0_syn0" population="Golgi_pop0">
            <input fractionAlong="0.785517" destination="synapses" id="0" segmentId="9" target="../Golgi_pop0/44/Golgi_10comp_13channels_2CaPoolsT"/>
            <input fractionAlong="0.758417" destination="synapses" id="1" segmentId="9" target="../Golgi_pop0/44/Golgi_10comp_13channels_2CaPoolsT"/>
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        </inputList>
        <inputList id="List_XFpop0b_PF_Golgi_pop0_syn1" component="XFpop0b_PF_Golgi_pop0_syn1" population="Golgi_pop0">
            <input fractionAlong="0.988806" destination="synapses" id="0" segmentId="3" target="../Golgi_pop0/44/Golgi_10comp_13channels_2CaPoolsT"/>
            <input fractionAlong="0.227912" destination="synapses" id="1" segmentId="8" target="../Golgi_pop0/44/Golgi_10comp_13channels_2CaPoolsT"/>
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        </inputList>
    </network>
</neuroml>
